# LAMMPS NVT molecular dynamics template for liquid Ge
# Placeholders filled at runtime by src/md_test.py and src/active_learning.py:
#   ${T_RUN}           → temperature in Kelvin
#   ${LAT_PARAM}       → diamond cubic lattice constant (Å); set lat_param in active_learning.yaml
#   ${SUPERCELL_SIZE}  → supercell repeat count (e.g. 2 → 2×2×2 = 64 atoms)
#   ${POT_PATH}        → absolute path to pot.almtp
#   ${GRADE_THRESHOLD} → γ_select
#   ${GRADE_BREAK}     → γ_break (set equal to γ_select for selecting one config per trajectory)

#===================== Simulation Parameters =======================
variable T          equal ${T_RUN}
variable run_steps  equal 10000
variable SEED       equal 12345

#===================== System Setup ================================
units       metal
boundary    p p p
atom_style  atomic

variable    lat_param equal ${LAT_PARAM}   # Ge diamond cubic lattice constant (Å)
lattice     diamond ${lat_param}
region      box block 0 ${SUPERCELL_SIZE} 0 ${SUPERCELL_SIZE} 0 ${SUPERCELL_SIZE} units lattice
create_box  1 box
create_atoms 1 box
mass        1 72.630              # Ge atomic mass (amu)

#===================== Potential ===================================
pair_style  mlip load_from=${POT_PATH} extrapolation_control=true &
            threshold_save=${GRADE_THRESHOLD} &
            threshold_break=${GRADE_BREAK} &
            save_extrapolative_to=preselected.cfg
pair_coeff  * *

neighbor    2.0 bin
neigh_modify delay 0 every 1 check yes

#===================== Initial Velocity ============================
velocity    all create ${T} ${SEED} mom yes rot yes

#===================== Thermodynamics ==============================
thermo_style custom step time temp press vol etotal
thermo      100

#===================== NVT Run =====================================
fix         1 all nvt temp ${T} ${T} 0.1
timestep    0.001

dump        1 all custom 100 dump.lammpstrj id type x y z vx vy vz
dump_modify 1 sort id

run         ${run_steps}
unfix       1
